# Worksheet setting: ORIGIN = 1
# .-SÍNTESIS DE CLOROETANO A PARTIR DE HCl y ETILENO-.
# Propiedades termodinámicas
# [area: Propiedades termodinámicas]
# - Compuestos independientes y propiedades críticas
Sustancias := ["1. Nitrogen"; "2. ethylene"; "3. Hydrogen Chloride"; "4. ethyl chloride"]
Formula := ["N2"; "C2H4"; "HCl"; "C2H5Cl"]
PM := [28.013; 28.054; 36.461; 64.514]  # kg/kmol
T_b := [77.35; 169.47; 188.15; 285.42]  # K
T_c := [126.10; 282.36; 324.65; 460.35]  # K
P_c := [33.94; 50.32; 83.09; 52.69]  # bar
ω := [0.04; 0.085; 0.132; 0.204]
# - Presión de vapor para sustancias puras
Coef_Pv := [
    23.8572, -476.68, -8.6689, 0.020128, -2.4139e-11;
    18.796, -999.62, -4.5788, 9.9746e-11, 6.788e-6;
    43.5455, -1627.9, -15.214, 0.013783, -1.4984e-11;
    28.345, -2078.8, -7.5387, -1.6384e-11, 4.055e-6
]
P_v(T) := 10^(Coef_Pv[:, 1] + Coef_Pv[:, 2]/T + Coef_Pv[:, 3]*log(T) + Coef_Pv[:, 4]*T + Coef_Pv[:, 5]*T^2)*1/760*1.013  # bar
P_v.prueba :=
    for i ∈ 1 .. rows(T_b)
        pv[i] ← P_v(T_b[i])[i]
    pv
P_v.prueba = [1.01248; 1.02487; 1.01653; 1.01315]  # bar
# - Constante de equilibrio liquido - vapor
y[i] == K_LV*x[i]
K_LV == ϕ_L/ϕ_V  # Método ϕ / ϕ
# Si consideramos una mezcla ideal, la constante de equilibrio la podemos expresar como:
K_LV == P_v(T)/P  # siendo P la presión total del sistema.
# En Fisicoquímica se analizó el origen de la fórmula y en la clase anterior se recordaron los supuestos e idealizaciones de Química General por si desean repasar el origen de las fórmulas señaladas.
# [reference: PR.xmcdz]
K_LV.Raoult(T, P) := P_v(T)/P  # <-- válida para mezclas ideales
K_LV.Raoult(292.15, 20) = [359.452; 3.07622; 2.05165; 0.0648456]
K_LV.ϕϕ(x, y, T, P) :=
    for i ∈ 1 .. rows(y)
        K[i] ← ϕ_L.PR(x, T, P, T_c, P_c, ω)[i]/ϕ_V.PR(y, T, P, T_c, P_c, ω)[i]
    K
ϕ_L.PR([0.081; 1.703; 10.476; 47.303], 293.15, 20, T_c, P_c, ω) = [41.6435; 2.689; 1.59836; 0.0660502]
# El método ϕϕ, contempla el comportamiento no ideal de las mezclas (ver en Fisicoquímica)
ϕ_V.PR([19.919; 3.572; 14.705; 2.124], 293.15, 20, T_c, P_c, ω) = [1.00898; 0.882196; 0.888567; 0.729147]
K_LV.ϕϕ([0.081; 1.703; 10.476; 47.303], [19.919; 3.572; 14.705; 2.124], 293.15, 20) = [41.2727; 3.04808; 1.7988; 0.0905855]
# Datos y especificaciones
# [area: Datos del enunciado]
N_c := 4
N_s := 15
N_reactores := 1
# - Mezclador (R1)
F_1 := 50  # kmol/h
x_1 := [0; 0; 1; 0]
F_2 := 50  # kmol/h
x_2 := [0.04; 0.96; 0; 0]
# - Reactor (C1)
# R1
# C2H4 +HCl --> C2H5Cl
ν_R1 := [0; -1; -1; 1]
f[:, 1] := F_1*x_1 = [0; 0; 50; 0]
|f[3, 1]/ν_R1[3]| = 50
f[:, 2] := F_2*x_2 = [2; 48; 0; 0]
|f[2, 2]/ν_R1[2]| = 48  # ---> reactivo limitante etileno (2)
χ_etileno := 90 %
# - Torre de destilacion de multiples etapas (K2)
Sustancias = ["1. Nitrogen"; "2. ethylene"; "3. Hydrogen Chloride"; "4. ethyl chloride"]
LK_K2 := 0.001
HK_K2 := 0.001
# - Divisor (S1)
β := 0.1  # Fracción de purga a la que vamos a simular el proceso
# Inicialización
g_inic(x, y) := 1
f := matrix(N_c, N_s, g_inic)
f = [
    1, 1, 1, 1, 1, 1, 1, 1, 1, 1, 1, 1, 1, 1, 1;
    1, 1, 1, 1, 1, 1, 1, 1, 1, 1, 1, 1, 1, 1, 1;
    1, 1, 1, 1, 1, 1, 1, 1, 1, 1, 1, 1, 1, 1, 1;
    1, 1, 1, 1, 1, 1, 1, 1, 1, 1, 1, 1, 1, 1, 1
]
f[:, 1] := F_1*x_1
f[:, 2] := F_2*x_2
ff := f  # Tener en cuenta que la corriente ff (corriente fija) se define después de cargar las corrientes dato.
ff = [
    0, 2, 1, 1, 1, 1, 1, 1, 1, 1, 1, 1, 1, 1, 1;
    0, 48, 1, 1, 1, 1, 1, 1, 1, 1, 1, 1, 1, 1, 1;
    50, 0, 1, 1, 1, 1, 1, 1, 1, 1, 1, 1, 1, 1, 1;
    0, 0, 1, 1, 1, 1, 1, 1, 1, 1, 1, 1, 1, 1, 1
]
ε_R1 := [1]  # Recordar que este valor es una matriz 1x1
# Arranco con valores iniciales todos iguales a 1. Esto es muy grueso para un equilibrio LV por lo que primero vamos a suponer una separación gruesa de manera que el balance de masa tenga una "solución de avance positivo". Una vez que podamos resolver f con una primera aproximación, procederemos a dar ese solución aproximada como los nuevos valores iniciales para lograr resolver el equilibrio LV real.
# Balance de masa (suponiendo un factor de separación gruesa)
# [area: Primera aproximación]
# Suposición para una primera aproximación
# - Torre de destilacion flash (K1)
# Simplemente para que resuelva rápido, aplicamos la hipótesis de componente clave con un factor de separación grueso. Tanto la elección de los componentes claves como el factor de separación, fue completamente arbitraria
LK_K1 := 0.1
Sustancias = ["1. Nitrogen"; "2. ethylene"; "3. Hydrogen Chloride"; "4. ethyl chloride"]
HK_K1 := 0.1
Given
# |
# |
# |
# |
# |
# |
# |
# |
# |
# |
# |
# |
# |
# |
# |
# |
# |
# |
# |
# |
# |
# |
# |
# |
# |
# |
# |
# |
# |
# |
# |
# |
# |
# |
# |
# |
# |
# |
# |
# |
# |
# |
# |
# |
# |
# |
# |
# Balance de masa  Parametros de diseño o requerimientos de equipos
# - Mezclador (R1)
ff[:, 1] + ff[:, 2] + f[:, 15] == f[:, 3]
# Recordar de f15, al comenzar el cálculo se plantea como corriente fija (ff) hasta que sea definido el divisor que la incluye. Luego se cambia por un flujo a calcular (f).
# - Reactor (R1)
f[:, 3] + ν_R1*ε_R1 == f[:, 4]
χ_etileno*f[2, 3] == f[2, 3] - f[2, 4]
# - Compresor (V1)
f[:, 4] == f[:, 5]
# - Intercambiador de calor (W1)
f[:, 5] == f[:, 6]
# - Torre de destilacion (K1)
f[:, 6] == f[:, 7] + f[:, 10]
f[1, 7] == 0
f[2, 7] == LK_K1*f[2, 6]
# para una primera aproximación
f[3, 10] == HK_K1*f[3, 6]
f[4, 10] == 0
# - Torre de destilación por etapas (K2)
f[:, 7] == f[:, 8] + f[:, 9]
f[1, 8] == 0
f[2, 8] == 0
f[3, 8] == LK_K2*f[3, 7]
# |
# |
# |
# |
# |
# |
# |
# |
# |
# |
# |
# |
# |
# |
# |
# |
# |
# |
# |
# |
# |
# |
# |
f[4, 9] == HK_K2*f[4, 7]
# - Mezclador (R1)
f[:, 9] + f[:, 10] == f[:, 11]
# - Divisor (S1)
f[:, 11] == f[:, 12] + f[:, 13]
f[:, 12] == β*f[:, 11]
# - Expansión (V2)
f[:, 13] == f[:, 14]
# - Intercambiador de calor (W2)
f[:, 14] == f[:, 15]
# Resolución del BM
[f_1.aprox; ε_1.aprox] := Find(f, ε_R1)
f_1.aprox = [
    0, 2, 20, 20, 20, 20, 0, 0, 0, 20, 20, 2, 18, 18, 18;
    0, 48, 52.7473, 5.27473, 5.27473, 5.27473, 0.527473, 0, 0.527473, 4.74725, 5.27473, 0.527473, 4.74725, 4.74725, 4.74725;
    50, 0, 72.5442, 25.0716, 25.0716, 25.0716, 22.5645, 0.0225645, 22.5419, 2.50716, 25.0491, 2.50491, 22.5442, 22.5442, 22.5442;
    0, 0, 0.0427638, 47.5153, 47.5153, 47.5153, 47.5153, 47.4678, 0.0475153, 0, 0.0475153, 0.00475153, 0.0427638, 0.0427638, 0.0427638
]
Sustancias = ["1. Nitrogen"; "2. ethylene"; "3. Hydrogen Chloride"; "4. ethyl chloride"]
ε_1.aprox
min(f_1.aprox) = -2.50856e-30  # ningún valor negativo
# Este BM respondería a una torre de destilación de múltiples etapas que -por diseño- separa todo el N2 por top y plantea un corte con el 10 % de etileno presente en la alimentación (F6) que sale por bottom. Ahora usando este BM, constamos con datos iniciales mejores y más cercanos a la realidad del proceso. Procedemos a usar este solución como valores iniciales del BM planteando destilación flash en lugar de torre de destilación de múltiples etapas.
# Balance de masa (equilibrio ideal)
# [area: BM con K ideal]
# - Torre de destilacion flash (K1)
T_op := 20 + 273.15
P_op := 20*1.013 = 20.26  # bar
K_LV.ideal := K_LV.Raoult(T_op, P_op) = [365.477; 3.09926; 2.07351; 0.066333]
# recuerden que -->
K_LV.Raoult(T, P) == K_LV.ideal == P_v(T)/P  # disabled
f[:, 7] := f_1.aprox[:, 7] = [0; 0.527473; 22.5645; 47.5153]
f[:, 10] := f_1.aprox[:, 10] = [20; 4.74725; 2.50716; 0]
# Actualizo el valor inicial para ayudar a Mathcad a converger ya que la solución del equilibrio LV es más difícil porque por cada iteracción, también vamos a pedirle a Mathcad que se meta dentro de la presión de vapor y tiene que encontrar la "f" que cumpla con todo el sistema de ecuaciones.
f = [
    0, 2, 1, 1, 1, 1, 0, 1, 1, 20, 1, 1, 1, 1, 1;
    0, 48, 1, 1, 1, 1, 0.527473, 1, 1, 4.74725, 1, 1, 1, 1, 1;
    50, 0, 1, 1, 1, 1, 22.5645, 1, 1, 2.50716, 1, 1, 1, 1, 1;
    0, 0, 1, 1, 1, 1, 47.5153, 1, 1, 0, 1, 1, 1, 1, 1
]
Given
# |
# |
# |
# |
# |
# |
# |
# |
# |
# |
# |
# |
# |
# |
# |
# |
# |
# |
# |
# |
# |
# |
# |
# |
# |
# |
# |
# |
# |
# |
# |
# |
# |
# |
# |
# |
# |
# |
# |
# |
# |
# |
# |
# |
# |
# |
# |
# |
# Balance de masa  Parametros de diseño o requerimientos de equipos
# - Mezclador (R1)
ff[:, 1] + ff[:, 2] + f[:, 15] == f[:, 3]
# - Reactor (R1)
f[:, 3] + ν_R1*ε_R1 == f[:, 4]
χ_etileno*f[2, 3] == f[2, 3] - f[2, 4]
# - Compresor (V1)
f[:, 4] == f[:, 5]
# - Intercambiador de calor (W1)
f[:, 5] == f[:, 6]
# - Torre de destilacion (K1)
f[:, 6] == f[:, 7] + f[:, 10]
f[:, 10]*sum(f[:, 7]) == vectorize(K_LV.ideal*f[:, 7])*sum(f[:, 10])  # <-- recuerde que en un equilibrio LV debe cumplir que:
# Otro tip a recordar es que el producto lo vectorizamos (--->) porque de lo contrario la multiplicación nos devolvería un número escalar (51,574 en este caso):
y[i] == K_LV*x[i]  # disabled
vectorize(K_LV.ideal*f[:, 7]) = [0; 1.63478; 46.7877; 3.15183]
K_LV.ideal*f[:, 7] = 51.5743
# ahora que contamos con valores iniciales más cercanos, si nos animamos a solicitar la resolución del equilibrio LV
# - Torre de destilación por etapas (K2)
f[:, 7] == f[:, 8] + f[:, 9]
f[1, 8] == 0
f[2, 8] == 0
f[3, 8] == LK_K2*f[3, 7]
# |
# |
# |
# |
# |
# |
# |
# |
# |
# |
# |
# |
# |
# |
# |
# |
# |
# |
# |
# |
# |
# |
# |
f[4, 9] == HK_K2*f[4, 7]
# - Mezclador (R1)
f[:, 9] + f[:, 10] == f[:, 11]
# - Divisor (S1)
f[:, 11] == f[:, 12] + f[:, 13]
f[:, 12] == β*f[:, 11]
# - Expansión (V2)
f[:, 13] == f[:, 14]
# - Intercambiador de calor (W2)
f[:, 14] == f[:, 15]
# Resolución del BM
[f_K.ideal; ε_K.ideal] := Find(f, ε_R1)
f_K.ideal = [
    0, 2, 20, 20, 20, 20, 0.0805121, 0, 0.0805121, 19.9195, 20, 2, 18, 18, 18;
    0, 48, 52.7473, 5.27473, 5.27473, 5.27473, 1.7026, 0, 1.7026, 3.57213, 5.27473, 0.527473, 4.74725, 4.74725, 4.74725;
    50, 0, 72.653, 25.1804, 25.1804, 25.1804, 10.4759, 0.0104759, 10.4654, 14.7046, 25.17, 2.517, 22.653, 22.653, 22.653;
    0, 0, 1.95425, 49.4268, 49.4268, 49.4268, 47.3027, 47.2554, 0.0473027, 2.12409, 2.17139, 0.217139, 1.95425, 1.95425, 1.95425
]
ε_K.ideal = [47.4725]
min(f_K.ideal) = 0  # ningun valor negativo
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f_K.ideal[:, 10] = [19.9195; 3.57213; 14.7046; 2.12409]  # kmol/hr
f_1.aprox[:, 10] = [20; 4.74725; 2.50716; 0]  # kmol/hr
f_K.ideal[:, 6] = [20; 5.27473; 25.1804; 49.4268]
f[:, 6] = [1; 1; 1; 1]
f_K.ideal[:, 7] = [0.0805121; 1.7026; 10.4759; 47.3027]  # kmol/hr
f_1.aprox[:, 7] = [0; 0.527473; 22.5645; 47.5153]  # kmol/hr
# Este BM responde bien a una torre de destilación flash que era lo que necesitábamos. Sin embargo, todavía cuenta con una imprecisión porque el equilibrio LV se está resolviendo con una constante ideal. Ya vimos/verán en Fisicoquímica que es una gran suposición que muestra desvíos respecto al comportamiento de mezclas reales. Si queremos refinar el cálculo, podemos usar esta solución como los nuevos valores iniciales para un BM usando K_LV.ϕϕ
# Balance de masa (equilibrio real)
# [area: BM con K real]
# Actualizo el valor inicial para ayudar a converger
# - Torre de destilacion flash (K1)
f[:, 7] := f_K.ideal[:, 7]
f[:, 10] := f_K.ideal[:, 10]
f = [
    0, 2, 1, 1, 1, 1, 0.0805121, 1, 1, 19.9195, 1, 1, 1, 1, 1;
    0, 48, 1, 1, 1, 1, 1.7026, 1, 1, 3.57213, 1, 1, 1, 1, 1;
    50, 0, 1, 1, 1, 1, 10.4759, 1, 1, 14.7046, 1, 1, 1, 1, 1;
    0, 0, 1, 1, 1, 1, 47.3027, 1, 1, 2.12409, 1, 1, 1, 1, 1
]
EaE(K, x) :=
    for i ∈ 1 .. rows(x)
        producto[i] ← K[i]*x[i]
    producto
# Como Kϕϕ proviene de una programación grande, no podemos vectorizar porque se va a meter dentro de la referencia y también va a querer vectorizar en cada paso rompiendo todo lo hecho en dicha referencia. Por eso programamos el producto vectorial elemento a elemento (EaE)
K_LV.ϕϕ(f[:, 7], f[:, 10], T_op, P_op) = [40.7618; 3.01589; 1.77932; 0.089868]
EaE(K_LV.ϕϕ(f[:, 7], f[:, 10], T_op, P_op), f[:, 7]/sum(f[:, 7])) = [0.0550995; 0.0862107; 0.312951; 0.0713714]
Given
# |
# |
# |
# |
# |
# |
# |
# |
# |
# |
# |
# |
# |
# |
# |
# |
# |
# |
# |
# |
# |
# |
# |
# |
# |
# |
# |
# |
# |
# |
# |
# |
# |
# |
# |
# |
# |
# |
# |
# |
# |
# |
# |
# |
# |
# |
# |
# |
# |
# |
# |
# |
# |
# |
# |
# |
# |
# Balance de masa  Parametros de diseño o requerimientos de equipos
# - Mezclador (R1)
ff[:, 1] + ff[:, 2] + f[:, 15] == f[:, 3]
# - Reactor (R1)
f[:, 3] + ν_R1*ε_R1 == f[:, 4]
χ_etileno*f[2, 3] == f[2, 3] - f[2, 4]
# - Compresor (V1)
f[:, 4] == f[:, 5]
# - Intercambiador de calor (W1)
f[:, 5] == f[:, 6]
# - Torre de destilacion (K1)
f[:, 6] == f[:, 7] + f[:, 10]
f[:, 10] == EaE(K_LV.ϕϕ(f[:, 7], f[:, 10], T_op, P_op), f[:, 7]/sum(f[:, 7]))*sum(f[:, 10])
# - Torre de destilación por etapas (K2)
f[1, 8] == 0
f[:, 7] == f[:, 8] + f[:, 9]
f[2, 8] == 0
f[3, 8] == LK_K2*f[3, 7]
f[4, 9] == HK_K2*f[4, 7]
# - Mezclador (R1)
f[:, 9] + f[:, 10] == f[:, 11]
# - Divisor (S1)
f[:, 11] == f[:, 12] + f[:, 13]
f[:, 12] == β*f[:, 11]
# - Expansión (V2)
# |
# |
# |
# |
# |
# |
# |
f[:, 13] == f[:, 14]
# - Intercambiador de calor (W2)
f[:, 14] == f[:, 15]
# Resolución del BM
[f_K.PR; ε_K.PR] := Find(f, ε_R1)
f_K.PR = [
    0, 2, 20, 20, 20, 20, 0.779433, 0, 0.779433, 19.2206, 20, 2, 18, 18, 18;
    0, 48, 52.7473, 5.27473, 5.27473, 5.27473, 1.84765, 0, 1.84765, 3.42707, 5.27473, 0.527473, 4.74725, 4.74725, 4.74725;
    50, 0, 72.6397, 25.1672, 25.1672, 25.1672, 11.9481, 0.0119481, 11.9361, 13.2191, 25.1552, 2.51552, 22.6397, 22.6397, 22.6397;
    0, 0, 2.44065, 49.9132, 49.9132, 49.9132, 47.2486, 47.2013, 0.0472486, 2.66458, 2.71183, 0.271183, 2.44065, 2.44065, 2.44065
]
ε_K.ideal = [47.4725]
min(f_K.ideal) = 0  # ningun valor negativo
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f_K.ideal[:, 10] = [19.9195; 3.57213; 14.7046; 2.12409]  # kmol/hr
f_1.aprox[:, 10] = [20; 4.74725; 2.50716; 0]  # kmol/hr
f_K.PR[:, 10] = [19.2206; 3.42707; 13.2191; 2.66458]  # kmol/hr
sum(f_K.PR[:, 10]) = 38.5313  # kmol/hr
f_K.PR[:, 6] = [20; 5.27473; 25.1672; 49.9132]  # kmol/hr
f_K.ideal[:, 6] = [20; 5.27473; 25.1804; 49.4268]
f[:, 6] = [1; 1; 1; 1]
α_vapor := sum(f_K.PR[:, 10])/sum(f_K.PR[:, 6]) = 0.38395  # TÍTULO DE VAPOR DE LA MEZCLA
sum(f_K.PR[:, 6]) = 100.355
f_K.PR[:, 7] = [0.779433; 1.84765; 11.9481; 47.2486]  # kmol/hr
f_K.ideal[:, 7] = [0.0805121; 1.7026; 10.4759; 47.3027]  # kmol/hr
f_1.aprox[:, 7] = [0; 0.527473; 22.5645; 47.5153]  # kmol/hr
