# Worksheet setting: ORIGIN = 1
# TRABAJO PRÁCTIO N°1-GRUPO J
# a) gráfica de las propiedades de los líquidos puros
Compuestos := ["1,4 Dimetil Tridecano"; "2,4 Dimetil Tetradecano"; "Hexadecano"]
# 1. Viscosidad
log(μ_liq) == A + B/(T/K) + C*T/K + D*(T/K)^2
Coef_μ := [
    -5.0263, 1034.3, 0.0087, -0.000008276;
    -4.9814, 1056.5, 0.0084, -0.0000079353;
    -8.1894, 1557.1, 0.0153, -0.000012371
]
μ(T) := 10^(Coef_μ[:, 1] + Coef_μ[:, 2]/(T/K) + Coef_μ[:, 3]*T/K + Coef_μ[:, 4]*(T/K)^2)*0.01*poise
T_ran := 270 K, 271 K .. 500 K
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# 2. Densidad
Coef_ρ := [0.246, 0.2617; 0.2463, 0.2613; 0.2435, 0.2544]
Tc := [683.39 K; 695.62 K; 720.6 K]
n := [0.2857; 0.2857; 0.3238]
ρ == A(B^(-(1 - T/T_c)^n))
ρ(T) := vectorize(Coef_ρ[:, 1]*(Coef_ρ[:, 2]^(-(1 - T/Tc)^n)))*gm/cm^3
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# 3. Conductividad térmica
k == (A + B*T/K + C*(T/K)^2)
Coef_k := [
    0.1496, -0.00003938, -0.00000019208;
    0.1461, -0.000032788, -0.00000018813;
    0.189, -0.00012226, -0.00000013059
]
k(T) := (Coef_k[:, 1] + Coef_k[:, 2]*T/K + Coef_k[:, 3]*(T/K)^2)*W/(m*K)
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# 4. Calor específico másico
C_pm == (A + B*T/K + C*(T/K)^2 + D*(T/K)^3)*J/(mol*K)
C_p == C_pm/(PM*gm/mol)
Coef_C.p := [
    258.507, 1.3429, -0.0034546, 0.0000040075;
    266.096, 1.4888, -0.0037813, 0.0000042498;
    89.101, 2.7062, -0.0061478, 0.000005752
]
PM := [212.419; 226.446; 226.446]
C_pm(T) := (Coef_C.p[:, 1] + Coef_C.p[:, 2]*(T/K) + Coef_C.p[:, 3]*(T/K)^2 + Coef_C.p[:, 4]*(T/K)^3)*J/(mol*K)
C_p(T) := C_pm(T)/(PM*gm/mol)
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# b) Determine la fracción molar de la mezcla, suponiendo comportamiento ideal de la viscosidad:
μ_M == sum(x_i*μ_i, i)
x_1 := 1
T_1 := 273 K
μ_1 := 0.04053*poise
x_2 := 1
T_2 := 340 K
μ_2 := 0.01167*poise
x_3 := 1
Given
μ_1 == x_1*μ(T_1)[1] + x_2*μ(T_1)[2] + x_3*μ(T_1)[3]
μ_2 == x_1*μ(T_2)[1] + x_2*μ(T_2)[2] + x_3*μ(T_2)[3]
x_1 + x_2 + x_3 == 1
[x_1; x_2; x_3] := Find(x_1, x_2, x_3)
X := [x_1; x_2; x_3] = [0.480337; 0.299482; 0.220181]
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# Viscosidad
μ_M(T) := x_1*μ(T)[1] + x_2*μ(T)[2] + x_3*μ(T)[3]
μ_M(273 K) = 0.004053 kg/(m*s)
μ_M(340 K) = 0.001167 kg/(m*s)
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# Se observa como disminuye la viscosidad de un líquido al
# aumentar la temperatura
# Conductividad térmica | Calor específico másico
k_M(T) := x_1*k(T)[1] + x_2*k(T)[2] + x_3*k(T)[3]
C_pM(T) := x_1*C_p(T)[1] + x_2*C_p(T)[2] + x_3*C_p(T)[3]
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# Densidad
ρ_M(T) := x_1*ρ(T)[1] + x_2*ρ(T)[2] + x_3*ρ(T)[3]
ρ_M(298.15 K) = 769.834 kg/m^3
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μ_M(298 K) = 0.00234389 kg/(m*s)
ρ(298 K) = [767.789; 773.122; 770.268] kg/m^3
μ(298 K) = [0.00200523; 0.00230365; 0.00313743] Pa*s
k_M(298 K) = 0.124892 W/(m*K)
C_pM(298 K) = 2166.83 J/(kg*K)
C_p(298 K) = [2155.94; 2148.1; 2216.06] J/(kg*K)
k(298 K) = [0.120807; 0.119622; 0.14097] W/(m*K)
ρ_M(298 K) = 769.932 kg/m^3
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PM_aire := 28.951*gm/mol
# Capacidad calorífica másica
C_p.aire(T) := (29.643 - 5.1373*10^-3*T/K + 1.3106*10^-5*(T/K)^2 - 4.8325*10^-9*(T/K)^3)*J/(mol*K)/PM_aire
C_p.aire(298.15 K) = 1006.81 J/(kg*K)
C_p.L.aire(T) := (-617.738 + 2.2399*10*T/K - 2.4905*10^-1*(T/K)^2 + 9.2633*10^-4*(T/K)^3)*J/(mol*K)/PM_aire
C_p.L.aire(110 K) = 2265.63 J/(kg*K)
C_p.S.aire(T) := (-0.0180 + 8.0076*10^-1*T/K - 2.3200*10^-1*(T/K)^2 + 2.0952*10^-2*(T/K)^3)*J/(mol*K)/PM_aire
C_p.S.aire(3.5 K) = 29.0483 J/(kg*K)
# Conductividad térmica
k_t.gas(T) := (-3.8603*10^-4 + 1.0311*10^-4*T/K - 5.4199*10^-8*(T/K)^2 + 1.7429*10^-11*(T/K)^3)*W/(m*K)
k_t.gas(298.15 K) = 0.0260002 W/(K*m)
# aumenta la conductividad de gas al aumentar la temperatura
k_t.gas(100 K) = 0.00940041 W/(K*m)
k_t.liq(T) := (0.278 - 1.5877*10^-3*T/K - 7.9383*10^-7*(T/K)^2)*W/(m*K)
k_t.liq(125 K) = 0.0671339 W/(K*m)
# disminuye la conductividad del liquido al aumentar la temperatura
k_t.liq(70 K) = 0.162971 W/(K*m)
# Viscosidad del aire (gas)
μ_aire.gas(T) := (4.5608 + 7.0077*10^-1*T/K - 3.7287*10^-4*(T/K)^2 + 9.0437*10^-8*(T/K)^3)*poise*10^-6
μ_aire.gas(100 K) = 7.09995e-5 poise
# aumenta la viscosidad del gas al aumentar la temperatura
μ_aire.gas(1000 K) = 0.000422898 poise
