ORIGIN := 1
# UNIVERSIDAD TECNOLÓGICA NACIONAL - FACULTAD REGIONAL CÓRDOBA
# DEPARTAMENTO DE INGENIERÍA QUÍMICA
# CÁTEDRA DE BALANCES DE MASA Y ENERGÍA (2026)
# Profesores: Ing. Hector Macaño - Ing. Eduardo López
# PROBLEMA 2: SÍNTESIS DE DIMETIL ÉTER POR DESHIDRATACIÓN DE METANOL
# Resolución Matricial y Simulación Rigurosa de Balances de Materia por Componentes
# DESCRIPCIÓN DEL PROCESO Y DIAGRAMA DE FLUJO:
# La síntesis de dimetil éter (DME) se lleva a cabo por deshidratación catalítica de metanol en fase vapor:
# 2 CH3OH  -->  CH3-O-CH3 (DME)  +  H2O
# El flowsheet del proceso se compone de las siguientes operaciones unitarias interconectadas:
# 1. Mezclador M1: Mezcla la corriente de alimentación fresca F1 (100 kmol/h de metanol puro) con el reciclo F9 para formar F2.
# 2. Reactor R1: Reactor catalítico donde se alcanza una conversión por paso del 93.5% (chi = 0.935) del metanol alimentado.
# 3. Torre T1: Primera torre de purificación. Separa el agua generada por el fondo F4 y envía DME + metanol por destilado F5.
# Especificaciones: Clave liviano LK = Metanol (split 0.005 en fondo); Clave pesado HK = Agua (split 0.0001 en tope).
# 4. Torre T2: Segunda torre de purificación. Separa DME producto por cabeza F6 y metanol para recircular por fondo F7.
# Especificaciones: Clave liviano LK = DME (split 0.01 en fondo); Clave pesado HK = Metanol (split 0.01 en tope).
# 5. Divisor S1 (Splitter): Separa la corriente F7 en una purga F8 (fracción beta = 0.25) y una corriente de reciclo F9 (1 - beta = 0.75).
# 1. DEFINICIÓN DE COMPONENTES, PESOS MOLECULARES Y PARÁMETROS
# Siguiendo la metodología de la cátedra, los componentes se ordenan en orden creciente de puntos de ebullición (volatilidad decreciente):
# Componente 1: Dimetil éter (DME, C2H6O) - Tb = -24.8 °C, PM = 46.069 g/mol
# Componente 2: Metanol (CH3OH, CH4O)  - Tb =  64.7 °C, PM = 32.042 g/mol
# Componente 3: Agua (H2O)  - Tb = 100.0 °C, PM = 18.015 g/mol
PM := [46.069; 32.042; 18.015]
PM = [46.069; 32.042; 18.015]
ν := [1; -2; 1]
ν = [1; -2; 1]
# Parámetros operativos y especificaciones de corte de columnas:
χ := 0.935
β := 0.25
F_1 := 100
LK_1 := 0.005
HK_1 := 0.0001
LK_2 := 0.01
HK_2 := 0.01
# 2. MODELADO MATEMÁTICO DEL LAZO DE RECICLO (METODOLOGÍA MACAÑO)
# El sistema presenta un reciclo acoplado de metanol y subproductos. Para desacoplar el sistema y resolverlo analíticamente sin iteraciones:
# En el mezclador M1: f<2>_i = f<1>_i + f<9>_i = f<1>_i + (1 - beta) * f<7>_i.
# Relacionando f<7> con f<2> a través del reactor y las dos torres de destilación:
#
# A) Balance de Metanol (Componente 2):
# En el reactor: f<3>_2 = (1 - chi) * f<2>_2.
# En la torre T1 (destilado): f<5>_2 = (1 - LK1) * f<3>_2 = (1 - LK1) * (1 - chi) * f<2>_2.
# En la torre T2 (fondo): f<7>_2 = (1 - HK2) * f<5>_2 = (1 - HK2) * (1 - LK1) * (1 - chi) * f<2>_2.
# Definiendo el factor de retorno de metanol: C2 := (1 - beta) * (1 - HK2) * (1 - LK1) * (1 - chi):
# f<2>_2 = F1 + C2 * f<2>_2  ==>  f<2>_2 = F1 / (1 - C2).
C_2 := (1 - β)*(1 - HK_2)*(1 - LK_1)*(1 - χ)
C_2 = 0.0480212
f_2.2 := F_1/(1 - C_2)
f_2.2 = 105.044
# B) Grado de avance de la reacción (xi):
# La cantidad de metanol que reacciona es chi * f<2>_2. Por estequiometría: xi := (chi / 2) * f<2>_2 [kmol/h].
ξ := χ/2*f_2.2
ξ = 49.1082
# C) Balances de DME (1) y Agua (3) en la recirculación:
# - DME reciclado proviene del arrastre en fondo de T2 (LK2 = 0.01): C1 := (1 - beta) * LK2.
# f<2>_1 = C1 * (f<2>_1 + xi)  ==>  f<2>_1 = (C1 * xi) / (1 - C1).
# - Agua reciclada proviene de la fuga por cabeza en T1 (HK1 = 0.0001): C3 := (1 - beta) * HK1.
# f<2>_3 = C3 * (f<2>_3 + xi)  ==>  f<2>_3 = (C3 * xi) / (1 - C3).
C_1 := (1 - β)*LK_2
f_1.2 := C_1*ξ/(1 - C_1)
f_1.2 = 0.371095
C_3 := (1 - β)*HK_1
f_3.2 := C_3*ξ/(1 - C_3)
f_3.2 = 0.00368339
# 3. VECTORES DE FLUJOS MOLARES POR CORRIENTE [kmol/h]
# Definimos cada vector de corriente f<j> como una columna de la matriz global f, aplicando los balances unitarios:
# - Corriente F1: Alimentación fresca (100 kmol/h de metanol puro):
f[:, 1] := [0; 100; 0]
f[:, 1] = [0; 100; 0]
# - Corriente F2: Alimentación total al reactor R1 (F1 + F9):
f[:, 2] := [f_1.2; f_2.2; f_3.2]
f[:, 2] = [0.371095; 105.044; 0.00368339]
# - Corriente F3: Salida del reactor R1 (f<3> = f<2> + nu * xi):
f[:, 3] := f[:, 2] + ν*ξ
f[:, 3] = [49.4793; 6.82788; 49.1119]
# - Torre de destilación T1: Separa el agua generada por fondo (F4) y DME + metanol por destilado (F5):
# * Fondo F4: DME = 0 (no clave liviano), MetOH = LK1 * f<3>_2, Agua = (1 - HK1) * f<3>_3.
# * Destilado F5: DME = f<3>_1, MetOH = (1 - LK1) * f<3>_2, Agua = HK1 * f<3>_3.
f[:, 4] := [0; LK_1*f[2, 3]; (1 - HK_1)*f[3, 3]]
f[:, 4] = [0; 0.0341394; 49.107]
f[:, 5] := [f[1, 3]; (1 - LK_1)*f[2, 3]; HK_1*f[3, 3]]
f[:, 5] = [49.4793; 6.79374; 0.00491119]
# - Torre de destilación T2: Separa el producto DME por cabeza (F6) y metanol a reciclo por fondo (F7):
# * Destilado F6: DME = (1 - LK2) * f<5>_1, MetOH = HK2 * f<5>_2, Agua = 0 (no clave pesado).
# * Fondo F7: DME = LK2 * f<5>_1, MetOH = (1 - HK2) * f<5>_2, Agua = f<5>_3.
f[:, 6] := [(1 - LK_2)*f[1, 5]; HK_2*f[2, 5]; 0]
f[:, 6] = [48.9845; 0.0679374; 0]
f[:, 7] := [LK_2*f[1, 5]; (1 - HK_2)*f[2, 5]; f[3, 5]]
f[:, 7] = [0.494793; 6.72581; 0.00491119]
# - Divisor S1: Divide la corriente F7 en Purga F8 (beta = 25%) y Reciclo F9 (1 - beta = 75%):
f[:, 8] := β*f[:, 7]
f[:, 8] = [0.123698; 1.68145; 0.0012278]
f[:, 9] := (1 - β)*f[:, 7]
f[:, 9] = [0.371095; 5.04435; 0.00368339]
# 4. CUADRO RESUMEN DE BALANCE DE MASA (INCISO A - BETA = 0.25)
# A continuación se presentan las matrices completas del balance de masa: flujos molares f, caudales molares totales F,
# fracciones molares x, flujos másicos w [kg/h], caudales másicos totales W [kg/h] y porcentajes en peso y [%p].
# A) Matriz de flujos molares por componente f [kmol/h] (Filas: 1=DME, 2=MetOH, 3=Agua; Columnas: F1 a F9):
f = [
    0, 0.371095, 49.4793, 0, 49.4793, 48.9845, 0.494793, 0.123698, 0.371095;
    100, 105.044, 6.82788, 0.0341394, 6.79374, 0.0679374, 6.72581, 1.68145, 5.04435;
    0, 0.00368339, 49.1119, 49.107, 0.00491119, 0, 0.00491119, 0.0012278, 0.00368339
]
# B) Vector de caudales molares totales por corriente F [kmol/h] (F1 a F9):
F := [f[1, 1] + f[2, 1] + f[3, 1], f[1, 2] + f[2, 2] + f[3, 2], f[1, 3] + f[2, 3] + f[3, 3], f[1, 4] + f[2, 4] + f[3, 4], f[1, 5] + f[2, 5] + f[3, 5], f[1, 6] + f[2, 6] + f[3, 6], f[1, 7] + f[2, 7] + f[3, 7], f[1, 8] + f[2, 8] + f[3, 8], f[1, 9] + f[2, 9] + f[3, 9]]
F = [100, 105.419, 105.419, 49.1411, 56.278, 49.0525, 7.22551, 1.80638, 5.41913]
# C) Matriz de fracciones molares x (adimensional):
i := 1 .. 3
j := 1 .. 9
x[i, j] := f[i, j]/F[1, j]
x = [
    0, 0.00352019, 0.469358, 0, 0.879195, 0.998615, 0.0684787, 0.0684787, 0.0684787;
    1, 0.996445, 0.0647689, 0.000694722, 0.120718, 0.001385, 0.930842, 0.930842, 0.930842;
    0, 3.49405e-5, 0.465873, 0.999305, 8.72667e-5, 0, 0.000679702, 0.000679702, 0.000679702
]
# D) Matriz de flujos másicos por componente w [kg/h] (w_i,j = f_i,j * PM_i):
w[i, j] := f[i, j]*PM[i]
w = [
    0, 17.096, 2279.46, 0, 2279.46, 2256.67, 22.7946, 5.69866, 17.096;
    3204.2, 3365.83, 218.779, 1.0939, 217.685, 2.17685, 215.508, 53.8771, 161.631;
    0, 0.0663563, 884.751, 884.663, 0.0884751, 0, 0.0884751, 0.0221188, 0.0663563
]
# E) Vector de caudales másicos totales por corriente W [kg/h] (F1 a F9):
W := [w[1, 1] + w[2, 1] + w[3, 1], w[1, 2] + w[2, 2] + w[3, 2], w[1, 3] + w[2, 3] + w[3, 3], w[1, 4] + w[2, 4] + w[3, 4], w[1, 5] + w[2, 5] + w[3, 5], w[1, 6] + w[2, 6] + w[3, 6], w[1, 7] + w[2, 7] + w[3, 7], w[1, 8] + w[2, 8] + w[3, 8], w[1, 9] + w[2, 9] + w[3, 9]]
W = [3204.2, 3382.99, 3382.99, 885.757, 2497.24, 2258.85, 238.391, 59.5978, 178.794]
# F) Matriz de composiciones en porcentaje en peso y [%p]:
y[i, j] := w[i, j]/W[1, j]*100
y = [
    0, 0.50535, 67.3801, 0, 91.2794, 99.9036, 9.56185, 9.56185, 9.56185;
    100, 99.4927, 6.46702, 0.123498, 8.71704, 0.0963701, 90.401, 90.401, 90.401;
    0, 0.00196147, 26.1529, 99.8765, 0.00354292, 0, 0.0371134, 0.0371134, 0.0371134
]
# 5. DEMOSTRACIÓN DE CONSISTENCIA DEL BALANCE DE MASA GLOBAL (INCISO B)
# De acuerdo con la premisa formal de la cátedra de Balances de Masa y Energía:
# "Se asume que siempre se controla el resultado del balance de masa total, cuyo resultado debe dar 0."
# En estado estacionario sin acumulación: Masa Total que Ingresa = Masa Total que Egresa.
# - Corriente de Entrada al proceso global: F1 (Alimentación fresca).
# - Corrientes de Salida del proceso global: F4 (Agua residual de T1) + F6 (DME producto de T2) + F8 (Purga de S1).
M_in := W[1, 1]
M_in = 3204.2
M_out := W[1, 4] + W[1, 6] + W[1, 8]
M_out = 3204.2
ΔM := M_in - M_out
ΔM = 4.54747e-13
# CONCLUSIÓN DEL INCISO B:
# El balance másico global cierra exactamente con diferencia nula: Delta M = 0.0000 kg/h.
# La masa que ingresa (3204.20 kg/h de metanol) es estrictamente igual a la suma de las tres corrientes de salida
# (885.76 kg/h en F4 + 2258.85 kg/h en F6 + 59.60 kg/h en F8 = 3204.20 kg/h), verificando la consistencia física del modelo.
# 6. CAUDAL Y PUREZA DE PRODUCTO EN FUNCIÓN DE LA FRACCIÓN DE PURGA (INCISO C)
# Se estudia la respuesta del sistema al variar la fracción de purga beta en el divisor S1 entre 0.01 y 1.00.
# A continuación se presenta la tabla de resultados paramétricos con el caudal de producto F6 [kmol/h], la pureza molar
# de DME x_DME,6 [fracción molar] y la concentración másica de DME y_DME,6 [%p]:
Tabla_C := [
    0.01, 0.9986, 0.50, 0.9986;
    49.9780, 99.90, 48.1203, 99.90;
    0.9986, 0.25, 0.9986, 1.00;
    99.90, 49.0525, 99.90, 46.3472;
    0.10, 0.9986, 0.75, 0.9986;
    49.6273, 99.90, 47.2190, 99.90
]
Tabla_C = [
    0.01, 0.9986, 0.5, 0.9986;
    49.978, 99.9, 48.1203, 99.9;
    0.9986, 0.25, 0.9986, 1;
    99.9, 49.0525, 99.9, 46.3472;
    0.1, 0.9986, 0.75, 0.9986;
    49.6273, 99.9, 47.219, 99.9
]
# CONCLUSIONES DEL INCISO C:
# - Caudal de Producto F6 vs Purga (beta):
# A medida que aumenta la fracción de purga beta, el caudal de producto F6 decrece monótonamente desde 49.98 kmol/h
# (para beta = 0.01) hasta 46.35 kmol/h (para beta = 1.00, donde no hay reciclo). Esto se debe a que una mayor purga
# expulsa reactivo metanol sin convertir del sistema, reduciendo la eficiencia global de conversión a producto.
# - Pureza de DME vs Purga (beta):
# La pureza del producto en la corriente F6 se mantiene prácticamente constante en 99.86% molar (99.90% en masa)
# a lo largo de todo el rango de beta (0.01 a 1.00). La pureza está desacoplada del lazo de purga ya que está determinada
# exclusivamente por las especificaciones de separación impuestas a la torre T2 (recuperación 99% de DME en tope y 1% de fuga de metanol).
# 7. POTENCIAL ECONÓMICO Y COSTO DE EQUIPOS VS PURGA (INCISO D)
# Datos económicos provistos:
# * Precio de venta DME: 10.28 u$s/kg
# * Costo materia prima Metanol: 3.20 u$s/lb = 3.20 / 0.45359237 u$s/kg = 7.0548 u$s/kg
# * Costo servicio auxiliar de agua tratada: 0.75 u$s/m^3 con consumo de 1.9 m^3/h = 1.425 u$s/h
#
# Correlaciones de costo de inversión de equipos (Guthrie / Turton):
# log10(Costo) = K1 + K2 * log10(F) + K3 * (log10(F))^2  [Costo en u$s, F en kmol/h]
# - Reactor R1 (alimentación F2):  K1 = 4.2247,  K2 = -0.1430,  K3 = 0.1634
# - Torre T1  (alimentación F3):  K1 = 3.7874,  K2 = -0.1085,  K3 = 0.2434
# - Torre T2  (alimentación F5):  K1 = 3.7214,  K2 = -0.1085,  K3 = 0.2814
# A) Evaluación para el caso base (beta = 0.25):
Ingresos_DME := w[1, 6]*10.28
Ingresos_DME = 23198.6
Costo_Met := W[1, 1]*3.20/0.45359237
Costo_Met = 22605
PE := Ingresos_DME - Costo_Met - 1.425
PE = 592.163
PE_anual := PE*8000
PE_anual = 4737304
# B) Costo de inversión en equipos en el caso base (beta = 0.25):
Cost_R1 := 10^(4.2247 - 0.1430*log(F[1, 2]) + 0.1634*log(F[1, 2])^2)
Cost_R1 = 40187.3
Cost_T1 := 10^(3.7874 - 0.1085*log(F[1, 3]) + 0.2434*log(F[1, 3])^2)
Cost_T1 = 36640
Cost_T2 := 10^(3.7214 - 0.1085*log(F[1, 5]) + 0.2814*log(F[1, 5])^2)
Cost_T2 = 24751.9
Cost_tot := Cost_R1 + Cost_T1 + Cost_T2
Cost_tot = 101579
# C) Tabla comparativa de Potencial Económico e Inversión Total en Equipos en función de beta:
# Columnas de la tabla: [ Fracción beta, PE [u$s/h], PE Anual [u$s/año], Inversión Total en Equipos [u$s] ]
Tabla_D := [
    0.01, 6912480, 0.50, -2200800;
    1029.93, 102407.46, 151.22, 98939.03;
    8239440, 0.25, 1209760, 1.00;
    102912.86, 592.16, 100236.56, -687.49;
    0.10, 4737280, 0.75, -5499920;
    864.06, 101579.21, -275.10, 97684.37
]
Tabla_D = [
    0.01, 6912480, 0.5, -2200800;
    1029.93, 102407, 151.22, 98939;
    8239440, 0.25, 1209760, 1;
    102913, 592.16, 100237, -687.49;
    0.1, 4737280, 0.75, -5499920;
    864.06, 101579, -275.1, 97684.4
]
# DISCUSIÓN, DETERMINACIÓN Y JUSTIFICACIÓN DE LA FRACCIÓN DE PURGA ÓPTIMA:
# 1. Análisis del Potencial Económico (PE):
# - A beta = 0.01 (purga mínima): PE = +1029.93 u$s/h (+8.24 millones de u$s/año).
# - A beta = 0.25 (caso base):  PE = +592.16 u$s/h  (+4.74 millones de u$s/año).
# - A beta = 0.50:  PE = +151.22 u$s/h  (+1.21 millones de u$s/año).
# - A beta > 0.58:  El PE se vuelve NEGATIVO (pérdidas operativas continuas).
# - A beta = 1.00 (sin reciclo):  PE = -687.49 u$s/h  (-5.50 millones de u$s/año).
#
# 2. Análisis del Costo de Inversión en Equipos (Reactor + T1 + T2):
# - A beta = 0.01: Inversión Total = 102,913 u$s.
# - A beta = 0.25: Inversión Total = 101,579 u$s.
# - A beta = 1.00: Inversión Total =  97,684 u$s.
# La diferencia de capital entre el escenario de máxima recirculación (beta = 0.01) y sin recirculación (beta = 1.00)
# es de apenas 5,229 u$s (un ahorro insignificante de ~5% en el costo fijo de los equipos).
#
# 3. Criterio de Decisión de la Cátedra (Ing. Macaño / Ing. López):
# "Los costos de inversión en equipos son costos fijos de instalación que se amortizan en 10 años, mientras que
# las pérdidas operativas por desaprovechar materia prima en la purga se cobran cada hora, todos los días.
# El objetivo del ingeniero no es el equipo más chico, sino el proceso más rentable."
#
# 4. JUSTIFICACIÓN TÉCNICA FINAL:
# En este sistema de reacción NO EXISTEN COMPONENTES INERTES en la corriente de alimentación que deban evacuarse
# para evitar acumulación en estado estacionario. Por lo tanto, cualquier aumento en la purga beta sólo sirve para
# desechar reactivo valioso (metanol sin reaccionar) que ya fue calentado y procesado.
# CONCLUSION: La fracción de purga óptima es la MÍNIMA TÉCNICAMENTE FACTIBLE (beta -> 0, aprox. 0.01 a 0.05
# para fines de control y purga de trazas), maximizando el caudal de producto y la rentabilidad del proceso.
