## FENÓMENOS DE TRANSPORTE (2026) - TRABAJO PRÁCTICO Nº 1
## Determinación de Composición y Estimación de Propiedades en Mezclas y Aire
# Autor: Cátedra de Fenómenos de Transporte / Resolución Integral Automatizada
# ------------------------------------------------------------------------------------------------------------------------
## 1. Configuración General y Definición de Unidades
ORIGIN := 1
cP := 0.01*poise
## 2. Pesos Moleculares (Orden estricto de compuestos)
# 1: 2,4-Dimetiltridecano | 2: 2,4-Dimetiltetradecano | 3: Hexadecano | Aire
MW_1 := 212.419*0.001*kg/mole
MW_2 := 226.446*0.001*kg/mole
MW_3 := 226.446*0.001*kg/mole
MW_aire := 28.951*0.001*kg/mole
## 3. Viscosidad de Líquidos Puros (Yaws 2003)
# Correlación: log10(mu / cP) = A + B/(T/K) + C*(T/K) + D*(T/K)^2
# Matriz de coeficientes de viscosidad [A, B, C, D] para los 3 hidrocarburos:
A_visc := [-5.0263; -4.9814; -8.1894]
B_visc := [1034.3; 1056.5; 1557.1]
C_visc := [0.0087; 0.0084; 0.0153]
D_visc := [-8.276e-6; -7.9353e-6; -1.2371e-5]
# Funciones de Viscosidad con unidades nativas:
mu_1(T) := 10^(-5.0263 + 1034.3/(T/K) + 0.0087*T/K + (-8.276e-6*(T/K)^2))*cP
mu_2(T) := 10^(-4.9814 + 1056.5/(T/K) + 0.0084*T/K + (-7.9353e-6*(T/K)^2))*cP
mu_3(T) := 10^(-8.1894 + 1557.1/(T/K) + 0.0153*T/K + (-1.2371e-5*(T/K)^2))*cP
## 4. Densidad de Líquidos Puros (Yaws 2003)
# Correlación: rho = A * B^(-(1 - T/Tc)^n) [g/cm^3]
rho_1(T) := 0.246*0.2617^(-(1 - T/(683.39*K))^0.2857)*1000*kg/m^3
rho_2(T) := 0.2463*0.2613^(-(1 - T/(695.62*K))^0.2857)*1000*kg/m^3
rho_3(T) := 0.2435*0.2544^(-(1 - T/(720.6*K))^0.3238)*1000*kg/m^3
## 5. Conductividad Térmica de Líquidos Puros (Yaws 2003)
# Correlación: k = (A + B*(T/K) + C*(T/K)^2) [W/(m*K)]
k_1(T) := (0.1496 + (-3.938e-5*T/K) + (-1.9208e-7*(T/K)^2))*watt/(m*K)
k_2(T) := (0.1461 + (-3.2788e-5*T/K) + (-1.8813e-7*(T/K)^2))*watt/(m*K)
k_3(T) := (0.189 + (-0.00012226*T/K) + (-1.3059e-7*(T/K)^2))*watt/(m*K)
## 6. Calor Específico Másico de Líquidos Puros (Yaws 2003)
# Correlación: cp_masico = (A + B*(T/K) + C*(T/K)^2 + D*(T/K)^3) / MW [J/(kg*K)]
cp_1(T) := (258.507 + 1.3429*T/K + (-0.0034546*(T/K)^2) + 4.0075e-6*(T/K)^3)*joule/(mole*K)/MW_1
cp_2(T) := (266.096 + 1.4888*T/K + (-0.0037813*(T/K)^2) + 4.2498e-6*(T/K)^3)*joule/(mole*K)/MW_2
cp_3(T) := (89.101 + 2.7062*T/K + (-0.0061478*(T/K)^2) + 5.752e-6*(T/K)^3)*joule/(mole*K)/MW_3
## 7. Inciso b) Determinación de la Composición Molar de la Mezcla
# Valores experimentales dados por el enunciado:
T_exp1 := 273*K
mu_exp1 := 4.053*cP
T_exp2 := 340*K
mu_exp2 := 1.167*cP
# Matriz del sistema M (orden columna) y vector término independiente b:
M := [
    1, 1, 1;
    mu_1(T_exp1)/cP, mu_2(T_exp1)/cP, mu_3(T_exp1)/cP;
    mu_1(T_exp2)/cP, mu_2(T_exp2)/cP, mu_3(T_exp2)/cP
]
b := [1; mu_exp1/cP; mu_exp2/cP]
# Resolución matricial exacta en Mathcad:  x := M^-1 * b
x := M^-1*b
x = [0.480337; 0.299482; 0.220181]
# Fracciones molares individuales calculadas:
x_1 := x[1]
x_2 := x[2]
x_3 := x[3]
## 8. Inciso c) Modelos y Estimación de Propiedades de la Mezcla
# Definición de funciones de mezcla con comportamiento ideal:
mu_M(T) := x_1*mu_1(T) + x_2*mu_2(T) + x_3*mu_3(T)
MW_M := x_1*MW_1 + x_2*MW_2 + x_3*MW_3
rho_M(T) := MW_M/(x_1*MW_1/rho_1(T) + x_2*MW_2/rho_2(T) + x_3*MW_3/rho_3(T))
k_M(T) := x_1*k_1(T) + x_2*k_2(T) + x_3*k_3(T)
cp_M(T) := (x_1*MW_1*cp_1(T) + x_2*MW_2*cp_2(T) + x_3*MW_3*cp_3(T))/MW_M
## Demostración de la Viscosidad de Mezcla calculada vs Datos Experimentales:
# Evaluación a 273 K en cP (Valor experimental esperado: 4.053 cP):
mu_M(273*K)/cP = 4.053
# Evaluación a 340 K en cP (Valor experimental esperado: 1.167 cP):
mu_M(340*K)/cP = 1.167
## 9. Inciso d) Tabla Resumen de Propiedades Valuadas a 298.15 K (Sistema Internacional)
# Temperatura estándar de evaluación: T_0 := 298.15 * K
T_0 := 298.15*K
# 1. Viscosidad Dinámica [Pa*s]:  (1: 2,4-DM-tridecano | 2: 2,4-DM-tetradecano | 3: Hexadecano | Mezcla)
mu_1(T_0) = 0.00199978 kg/(m*s)
mu_2(T_0) = 0.00229711 kg/(m*s)
mu_3(T_0) = 0.00312704 kg/(m*s)
mu_M(T_0) = 0.00233703 kg/(m*s)
# 2. Densidad [kg/m^3]:  (1: 2,4-DM-tridecano | 2: 2,4-DM-tetradecano | 3: Hexadecano | Mezcla)
rho_1(T_0) = 767.691 kg/m^3
rho_2(T_0) = 773.026 kg/m^3
rho_3(T_0) = 770.166 kg/m^3
rho_M(T_0) = 769.893 kg/m^3
# 3. Conductividad Térmica [W/(m*K)]:  (1: 2,4-DM-tridecano | 2: 2,4-DM-tetradecano | 3: Hexadecano | Mezcla)
k_1(T_0) = 0.120784 kg*m/(K*s^3)
k_2(T_0) = 0.119601 kg*m/(K*s^3)
k_3(T_0) = 0.14094 kg*m/(K*s^3)
k_M(T_0) = 0.124868 kg*m/(K*s^3)
# 4. Calor Específico Másico [J/(kg*K)]:  (1: 2,4-DM-tridecano | 2: 2,4-DM-tetradecano | 3: Hexadecano | Mezcla)
cp_1(T_0) = 2156.18 m^2/(K*s^2)
cp_2(T_0) = 2148.34 m^2/(K*s^2)
cp_3(T_0) = 2216.44 m^2/(K*s^2)
cp_M(T_0) = 2167.44 m^2/(K*s^2)
## 10. Inciso e) Propiedades del Aire Gaseoso (Capítulo 4 - Yaws Handbook)
# Estimación de propiedades para el aire gaseoso a baja presión en función de T:
cp_aire(T) := (29.643 + (-0.0051373*T/K) + 1.3106e-5*(T/K)^2 + (-4.8325e-9*(T/K)^3))*joule/(mole*K)/MW_aire
k_aire(T) := (-0.00038603 + 0.00010311*T/K + (-5.4199e-8*(T/K)^2) + 1.7429e-11*(T/K)^3)*watt/(m*K)
mu_aire(T) := (4.5608 + 0.70077*T/K + (-0.00037287*(T/K)^2) + 9.0437e-8*(T/K)^3)*1e-7*Pa*s
# Evaluación de Propiedades del Aire a 298.15 K en Sistema Internacional (SI):
cp_aire(T_0) = 1006.81 m^2/(K*s^2)
k_aire(T_0) = 0.0260002 kg*m/(K*s^3)
mu_aire(T_0) = 1.82747e-5 kg/(m*s)
## 11. Rango de Temperatura y Variables para Gráficos (270 K a 500 K)
# Definición de rangos de temperatura con y sin unidades para graficar:
T := 270*K, 275*K, 500*K
T_ad := 270, 275, 500
# Funciones auxiliares adimensionales para graficar de forma directa:
mu1_p(T) := mu_1(T)/cP
mu2_p(T) := mu_2(T)/cP
mu3_p(T) := mu_3(T)/cP
muM_p(T) := mu_M(T)/cP
