# Trabajo Practico No 1 - Resultados
# Coeficientes de Viscosidad (A, B, C, D) para 1: 2,4-Dimetiltridecano, 2: 2,4-Dimetiltetradecano, 3: Hexadecano
A_visc := [-5.0263; -4.9814; -8.1894]
B_visc := [1034.3; 1056.5; 1557.1]
C_visc := [0.0087; 0.0084; 0.0153]
D_visc := [-8.276e-6; -7.9353e-6; -1.2371e-5]
# Fracciones molares calculadas (x1, x2, x3):
x := [0.4803; 0.2995; 0.2202]
# Coeficientes de Densidad (A, B, n, Tc):
A_den := [0.246; 0.2463; 0.2435]
B_den := [0.2617; 0.2613; 0.2544]
n_den := [0.2857; 0.2857; 0.3238]
T_c := [683.39; 695.62; 720.6]
# Coeficientes de Conductividad Termica (A, B, C):
A_k := [0.1496; 0.1461; 0.189]
B_k := [-3.938e-5; -3.2788e-5; -0.00012226]
C_k := [-1.9208e-7; -1.8813e-7; -1.3059e-7]
# Coeficientes de Calor Especifico L (A, B, C, D):
A_cp := [258.507; 266.096; 89.101]
B_cp := [1.3429; 1.4888; 2.7062]
C_cp := [-0.0034546; -0.0037813; -0.0061478]
D_cp := [4.0075e-6; 4.2498e-6; 5.752e-6]
# Propiedades del Aire (Gas) - Capitulo 4:
# Cp Gas (J/mol K) A, B, C, D:
Cp_air := [29.643; -0.0051373; 1.3106e-5; -4.8325e-9]
K_air := [-0.00038603; 0.00010311; -5.4199e-8; 1.7429e-11]  # K Gas (W/m K) A, B, C, D:
mu_air := [4.5608; 0.70077; -0.00037287; 9.0437e-8]  # Visc Gas (uP) A, B, C, D:
