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ORIGIN := 1
P_1 := 20.265  # bar
T_1 := 273.15 + 20 = 293.15  # K
# 1 hcl
# 2 etileno
# 3 N2
# 4 cloruro de etilo
sustancia := ["N2"; "HCL"; "etileno"; "cloruro de etilo"]
t_eb := [77.35; 188.15; 169.15; 285.42]
PM := [28.02; 36.46; 28.05; 64.51]
coef_pv := [
    23.8572, -476.68, -8.6689, 0.020128, -2.4139e-11;
    43.5455, -1627.9, -15.214, 0.013783, -1.4984e-11;
    18.796, -999.62, -4.5788, 9.9746e-11, 6.788e-6;
    28.345, -2078.8, -7.5387, -1.6384e-11, 4.055e-6
]
atm
P_v(T) := 10^(coef_pv[:, 1] + coef_pv[:, 2]/T + coef_pv[:, 3]*log(T) + coef_pv[:, 4]*T + coef_pv[:, 5]*T^2)*1/760
P_v(t_eb[3]) = [176.311; 0.295902; 0.992945; 0.000310634]
α(T) := P_v(T)/P_v(T)[4]
# especificaciones
N_C := 4
N_S := 15
N_R := 1
F_1 := 50
x_1 := [0; 0; 1; 0]
F_2 := 50
x_2 := [0.04; 0.96; 0; 0]
# esquema ed reaciocion del reactor c1
# C2H4 + HCL --> C2H5Cl
# BMT)  F3 - ε = F4
# BMC)
#
# REST 2
f[:, 1] := F_1*x_1 = [0; 0; 50; 0]
ν := [0; -1; -1; 1]
f[:, 2] := F_2*x_2 = [2; 48; 0; 0]
f = [0, 2; 0, 48; 50, 0; 0, 0]
sum(ν) = -1
X_etileno := 0.9
α_K1 := α(273.15 + 20) = [5509.73; 31.2591; 46.7228; 1]
f[2, 2]/ν[2] = -48
f[3, 1]/ν[3] = -50
# TORRE DE DESTILACIO K2
# hipotsis del componente clave
LK := 0.001
sustancia = ["N2"; "HCL"; "etileno"; "cloruro de etilo"]
HK := 0.001
β := 0.1
# fraccion de purga
R_m := 1
# INICIALIZACION DE VARIABLES
ε_R1 := [1]
g_inic(x, y) := 1
f := matrix(N_C, N_S, g_inic) = [
    1, 1, 1, 1, 1, 1, 1, 1, 1, 1, 1, 1, 1, 1, 1;
    1, 1, 1, 1, 1, 1, 1, 1, 1, 1, 1, 1, 1, 1, 1;
    1, 1, 1, 1, 1, 1, 1, 1, 1, 1, 1, 1, 1, 1, 1;
    1, 1, 1, 1, 1, 1, 1, 1, 1, 1, 1, 1, 1, 1, 1
]
f[:, 1] := F_1*x_1 = [0; 0; 50; 0]
f[:, 2] := F_2*x_2 = [2; 48; 0; 0]
f = [
    0, 2, 1, 1, 1, 1, 1, 1, 1, 1, 1, 1, 1, 1, 1;
    0, 48, 1, 1, 1, 1, 1, 1, 1, 1, 1, 1, 1, 1, 1;
    50, 0, 1, 1, 1, 1, 1, 1, 1, 1, 1, 1, 1, 1, 1;
    0, 0, 1, 1, 1, 1, 1, 1, 1, 1, 1, 1, 1, 1, 1
]
ff := f
## mezclador
Given
ff[:, 1] + ff[:, 2] + ff[:, 15] == f[:, 3]
f := Find(f)
f = [
    0, 2, 3, 1, 1, 1, 1, 1, 1, 1, 1, 1, 1, 1, 1;
    0, 48, 49, 1, 1, 1, 1, 1, 1, 1, 1, 1, 1, 1, 1;
    50, 0, 51, 1, 1, 1, 1, 1, 1, 1, 1, 1, 1, 1, 1;
    0, 0, 1, 1, 1, 1, 1, 1, 1, 1, 1, 1, 1, 1, 1
]
ff := f
REACTOR
X_etileno == (f[2, 3] - f[2, 4])/f[2, 3]
f[:, 3] + ν*ε_R1 == f[:, 4]
ε_R1 = [1]
compresor
f = [
    0, 2, 3, 1, 1, 1, 1, 1, 1, 1, 1, 1, 1, 1, 1;
    0, 48, 49, 1, 1, 1, 1, 1, 1, 1, 1, 1, 1, 1, 1;
    50, 0, 51, 1, 1, 1, 1, 1, 1, 1, 1, 1, 1, 1, 1;
    0, 0, 1, 1, 1, 1, 1, 1, 1, 1, 1, 1, 1, 1, 1
]
f[:, 4] == f[:, 5]
# intercambiador de calor
f[:, 5] == f[:, 6]
# torre de destilacion 1
f[:, 6] == f[:, 7] + f[:, 10]
f[:, 10] == vectorize(α_K1*f[:, 7])
# torre de destilacion 2
f[1, 8] == 0
f[:, 7] == f[:, 8] + f[:, 9]
f[2, 8] == 0
f[3, 8] == LK*f[3, 7]
f[4, 9] == HK*f[4, 7]
mezcladr
f[:, 6] + f[:, 10] == f[:, 11]
divisor
f[:, 11] + f[:, 12] == f[:, 13]
β*f[:, 11] == f[:, 12]
[ν; ε_R1] := Find(f, ε_R1)  # error: This variable is undefined.
expansion
f[:, 13] == f[:, 14]
# intercambiador w2
