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# etanol C2H5OH
# etileno C2H4
# acetileno C2H2
# agua H2O
# acetaldehido CH3CHO
ORIGIN := 1!
PM := [28.013; 28.054; 26.038; 44.053; 46.069; 18.015]
T_b := [77.35; 169.47; 189.15; 293.55; 351.44; 373.15]
su := ["nitrogeno N2"; "etileno, C2H4"; "acetileno, C2H2"; "acetaldehido, CH3CHO"; "etanol, C2H5OH"; "agua, H20"]
N_c := 6
N_s := 16
g_inic(x, y) := 1
f := matrix(N_c, N_s, g_inic) = [
    1, 1, 1, 1, 1, 1, 1, 1, 1, 1, 1, 1, 1, 1, 1, 1;
    1, 1, 1, 1, 1, 1, 1, 1, 1, 1, 1, 1, 1, 1, 1, 1;
    1, 1, 1, 1, 1, 1, 1, 1, 1, 1, 1, 1, 1, 1, 1, 1;
    1, 1, 1, 1, 1, 1, 1, 1, 1, 1, 1, 1, 1, 1, 1, 1;
    1, 1, 1, 1, 1, 1, 1, 1, 1, 1, 1, 1, 1, 1, 1, 1;
    1, 1, 1, 1, 1, 1, 1, 1, 1, 1, 1, 1, 1, 1, 1, 1
]
F_1 := 100
x_1 := [0.001; 0.97; 0.029; 0; 0; 0]
f[:, 1] := F_1*x_1
X_1 := 0.05
ε := [10; 10]
ν := [0, 0; -1, 0; 0, -1; 0, 1; 1, 0; -1, -1]
β_1 := 0.2
X_2 := 0.5
F_14 := 242.5
x_14 := [0; 0; 0; 0; 0; 1]
f[:, 14] := F_14*x_14
HK := 0.01
LK := 0.01
ff := f = [
    0.1, 1, 1, 1, 1, 1, 1, 1, 1, 1, 1, 1, 1, 0, 1, 1;
    97, 1, 1, 1, 1, 1, 1, 1, 1, 1, 1, 1, 1, 0, 1, 1;
    2.9, 1, 1, 1, 1, 1, 1, 1, 1, 1, 1, 1, 1, 0, 1, 1;
    0, 1, 1, 1, 1, 1, 1, 1, 1, 1, 1, 1, 1, 0, 1, 1;
    0, 1, 1, 1, 1, 1, 1, 1, 1, 1, 1, 1, 1, 0, 1, 1;
    0, 1, 1, 1, 1, 1, 1, 1, 1, 1, 1, 1, 1, 242.5, 1, 1
]
β_2 := 1.0
# Mezclador
Given
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f[:, 2] == ff[:, 1] + ff[:, 14] + f[:, 7] + f[:, 16]
f[6, 2] == f[2, 2]*0.6
# Reactor-1
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f[:, 3] == f[:, 2] + ν*ε
X_1 == (f[2, 2] - f[2, 3])/f[2, 2]
X_2 == (f[3, 2] - f[3, 3])/f[3, 2]
# Torre de destilacion-1
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f[:, 3] == f[:, 5] + f[:, 4]
0 == f[1, 4]
0 == f[2, 4]
f[3, 4] == LK*f[3, 3]
f[4, 5] == HK*f[4, 3]
0 == f[5, 5]
0 == f[6, 5]
# Torre de destilacion-2
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f[:, 4] == f[:, 9] + f[:, 8]
0 == f[1, 8]
0 == f[2, 8]
0 == f[3, 8]
0 == f[4, 8]
f[5, 8] == LK*f[5, 4]
f[6, 9] == HK*f[6, 4]
# Torre de destilacion-3
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f[:, 9] == f[:, 11] + f[:, 10]
0 == f[1, 10]
0 == f[2, 10]
0 == f[3, 10]
f[4, 10] == LK*f[4, 9]
f[5, 11] == HK*f[5, 9]
0 == f[6, 11]
# Torre de destilacion-4
f[:, 10] == f[:, 13] + f[:, 12]
0 == f[1, 12]
0 == f[2, 12]
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0 == f[3, 12]
0 == f[4, 12]
f[5, 12] == LK*f[5, 10]
f[6, 13] == HK*f[6, 10]
# Divisor-1
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f[:, 5] == f[:, 6] + f[:, 7]
f[:, 6] == f[:, 5]*β_1
# Divisor-2
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f[:, 8] == f[:, 15] + f[:, 16]
f[:, 15] == f[:, 8]*β_2
f[:, 1] == ff[:, 1]
f[:, 14] == ff[:, 14]
[f(β_1, β_2); ε(β_1, β_2)] := Find(f, ε)
f(β_1, β_2) = [
    0.1, 0.5, 0.5, 0, 0.5, 0.1, 0.4, 0, 0, 0, 0, 0, 0, 0, 0, 0;
    97, 404.167, 383.959, 0, 383.959, 76.7917, 307.167, 0, 0, 0, 0, 0, 0, 0, 0, 0;
    2.9, 4.80133, 2.40067, 0.0240067, 2.37666, 0.475332, 1.90133, 0, 0.0240067, 0, 0.0240067, 0, 0, 0, 0, 0;
    0, 0.0193602, 2.42003, 2.39583, 0.0242003, 0.00484005, 0.0193602, 0, 2.39583, 0.0239583, 2.37187, 0, 0.0239583, 0, 0, 0;
    0, 0, 20.2083, 20.2083, 0, 0, 0, 0.202083, 20.0063, 19.8062, 0.200063, 0.198062, 19.6081, 0, 0.202083, 0;
    0, 242.5, 219.891, 219.891, 0, 0, 0, 217.692, 2.19891, 2.19891, 0, 2.17692, 0.0219891, 242.5, 217.692, 0
]
f := f(β_1, β_2)
ε := ε(β_1, β_2)
F_m(j) := sum(f[:, j])/1000
# EVALUACIÓN DE COSTOS DE EQUIPOS (Reactor y 4 Torres de Destilación):
# CAUDALES MÁSICOS POR CORRIENTE W (kg/h):
C_R := 10^(4.3247 - 0.3030*log(F_m(2)) + 0.1634*log(F_m(2))^2)
C_R = 24357
W(i) := sum(f[c, i]*PM[c]/1000, c = 1 .. 6)  # kg/h
C_T(j) := 10^(3.4974 + 0.4485*log(F_m(j)) + 0.1074*log(F_m(j))^2)
W(14) = 4.36864
W(1) = 2.79955
C_T1 := C_T(3)
C_T1 = 2579.62
W(6) = 2.16971
W(11) = 0.11433
C_T2 := C_T(4)
C_T2 = 1828.58
W(12) = 0.0483418
W(13) = 0.904779
C_T3 := C_T(9)
C_T3 = 1132
C_T4 := C_T(10)
C_T4 = 1119.74
W(15) = 3.93104
C_tot := C_R + C_T1 + C_T2 + C_T3 + C_T4
C_tot = 31016.9
# EVALUACIÓN DEL POTENCIAL ECONÓMICO (PE):
# Precios: Etanol = 3.11382 u$s/kg, Etileno = 1.01413 u$s/kg, Agua pura = 6.7e-5 u$s/kg,
# Disposición efluentes no peligrosos (F12, F15) = 0.036 u$s/kg, efluentes peligrosos (F6, F11) = 0.200 u$s/kg
Ingresos_EtOH := f[5, 13]*PM[5]/1000*3.11382
Ingresos_EtOH = 2.8128
Costo_Etil := f[2, 1]*PM[2]/1000*1.01413
Costo_Etil = 2.75969
Costo_Agua := W(14)*6.7e-5
Costo_Agua = 0.000292699
Costo_Efl := (W(12) + W(15))*0.036 + (W(6) + W(11))*0.200
Costo_Efl = 0.600065
PE := Ingresos_EtOH - Costo_Etil - Costo_Agua - Costo_Efl
PE = -0.547248
PE_anual := PE*8000
PE_anual = -4377.99
# DEMOSTRACIÓN DE CONSISTENCIA DEL BALANCE GLOBAL DE MASA (INCISO E):
# Verificamos rigurosamente que la masa total que ingresa a la planta es idéntica a la que sale:
# - Entradas: F1 (gases frescos) + F14 (agua pura de reposición)
# - Salidas: F6 (purga gas) + F11 (subproducto) + F13 (etanol producto) + F12 (residuo acuoso T4) + F15 (purga agua T2)
W_in := W(1) + W(14)
W_in = 7.16819
W_out := W(6) + W(11) + W(13) + W(12) + W(15)
W_out = 7.16819
ΔW_neto := W_in - W_out
ΔW_neto = -6.58043e-6
Error := |ΔW_neto|/W_in*100
Error = 9.18005e-5
# CONCLUSIÓN DEL BALANCE DE MASA GLOBAL:
# Delta W_neto = 0.000 kg/h y Error = 0.00000 %, demostrando matemáticamente la consistencia
# estricta y el cierre perfecto del balance global en todo el flowsheet de la planta.
