ORIGIN := 1
T := 298.15
P := 300  # bar
y := [0.5; 0.3; 0.2]
T_c := [190.58; 305.42; 304.19]
P_c := [46.04; 48.8; 73.82]
ω := [0.011; 0.099; 0.228]
# [reference: PR.xmcdz]
ϕ_V.PR.puro*(298.15, 300, T_c, P_c, ω) =  # error: This value must be a scalar.
T_c = [190.58; 305.42; 304.19]
f_V.mezcla(T, P, y) := f_V.PR(y, T, P, T_c, P_c, ω)
f_V.mezcla(T, P, y) = [109.687; 18.8163; 15.5343]
ϕ_V.puro(T, P) := ϕ_V.PR.puro(T, P, T_c, P_c, ω)
ϕ_V.puro(T, P) = [0.671178; 0.19718; 0.230981]
f_V.puro(T, P) := ϕ_V.puro(T, P)*P
P_g := 1, 10 .. 300
f_V.puro(T, P) = [201.353; 59.1539; 69.2944]
ds □ □
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