T := 298.15
P := 300
y := [0.2; 0.4; 0.4]
T_c := [190.6; 305.3; 304.2]
P_c := [46.1; 48.7; 73.8]
w := [0.011; 0.099; 0.224]
# [reference: PR.xmcdz]
z_V.PR(y, T, P, T_c, P_c, w) = 0.670637
V_V.PR(y, T, P, T_c, P_c, w) = 0.0553196
ϕ_V.PR(y, T, P, T_c, P_c, w) = [0.82481; 0.198063; 0.239447]
