# [reference: SRK.xmcdz]
ORIGIN := 1
## TERMODINAMICA DE SOLUCIONES - EJERCICIO 2 (SRK)
# Mezcla ternaria liquida: Benceno(1), Ciclohexano(2), Naftaleno(3) en tanque atmosferico a 300 K.
# Composicion: x1 = 0.60, x3 = 0.30 -> x2 = 1 - x1 - x3 = 0.10. Modelo: Soave-Redlich-Kwong (SRK).
## 1. Parametros criticos, factor acentrico y composicion de la mezcla
T_c := [562.2; 553.6; 748.4]
P_c := [48.98; 40.73; 40.51]
w := [0.210; 0.210; 0.302]
x := [0.60; 0.10; 0.30]
x_1 := 0.60
x_2 := 0.10
x_3 := 0.30
## PARTE A) Fugacidad de Benceno(1) Puro vs Mezcla en funcion de T (P = 1 atm). Evaluacion a T = 450 K
# Condiciones: Presion constante P = 1 atm = 1.01325 bar, Temperatura T = 450 K.
T_A := 450
P_A := 1.01325
# Coeficientes de fugacidad puros ϕ_L.puro: | Coeficientes de fugacidad en mezcla ϕ_L.mezcla:
ϕ_L.SRK.puro(T_A, P_A, T_c, P_c, w) = [8.11018; 7.50916; 0.346586]
ϕ_L.SRK(x, T_A, P_A, T_c, P_c, w) = [8.20456; 8.08585; 0.365211]
# Fugacidad de puros f_puro = ϕ_puro * P (bar): | Fugacidad Benceno(1) en mezcla f1_hat (bar):
ϕ_L.SRK.puro(T_A, P_A, T_c, P_c, w)*P_A = [8.21764; 7.60865; 0.351178]
0.60*ϕ_L.SRK(x, T_A, P_A, T_c, P_c, w)[1]*P_A = 4.98796
## PARTE B) Fugacidad de Benceno(1) Puro vs Mezcla en funcion de P (T = 300 K). Evaluacion a P = 10 atm
# Condiciones: Temperatura constante T = 300 K, Presion P = 10 atm = 10.1325 bar.
T_B := 300
P_B := 10.1325
# Coeficientes de fugacidad puros a 10 atm: | Coeficientes de fugacidad en mezcla a 10 atm:
ϕ_L.SRK.puro(T_B, P_B, T_c, P_c, w) = [0.0142663; 0.0146561; 4.06506e-5]
ϕ_L.SRK(x, T_B, P_B, T_c, P_c, w) = [0.0142287; 0.0160335; 4.15519e-5]
# Fugacidad de puros f_puro (bar): | Fugacidad Benceno(1) en mezcla f1_hat (bar):
ϕ_L.SRK.puro(T_B, P_B, T_c, P_c, w)*P_B = [0.144553; 0.148503; 0.000411892]
0.60*ϕ_L.SRK(x, T_B, P_B, T_c, P_c, w)[1]*P_B = 0.0865034
## PARTE C y D) Variacion de Volumen Molar y Calculo a P = 1 atm (1.01325 bar) y T = 400 K
# Al aumentar la temperatura a presion constante, el volumen de liquido se expande termicamente.
# Orden de volumenes: V_Benceno < V_mezcla < V_Ciclohexano < V_Naftaleno.
T_D := 400
P_D := 1.01325
# Volumen molar de la mezcla liquida V_L (L/mol): | Volumen molar de componentes puros V_puro (L/mol):
V_L.SRK(x, T_D, P_D, T_c, P_c, w) = 0.126703
V_L.SRK.puro(T_D, P_D, T_c, P_c, w) = [0.112964; 0.135357; 0.156328]
# Factor de compresibilidad Z de la mezcla liquida:
z_L.SRK(x, T_D, P_D, T_c, P_c, w) = 0.00386693
# RESUMEN DE RESULTADOS NUMERICOS:
# - A) A 450 K y 1 atm: f_puro(Benceno) = 8.218 bar, f_mezcla(Benceno) = 4.988 bar.
# - B) A 300 K y 10 atm: f_puro(Benceno) = 0.1446 bar, f_mezcla(Benceno) = 0.0865 bar.
# - D) A 400 K y 1 atm: V_mezcla = 0.1267 L/mol, V_puros = [0.1130 (Benceno), 0.1354 (Ciclohexano), 0.1563 (Naftaleno)] L/mol.
f1_puro(a) := P_A*ϕ_L.SRK.puro(a, P_A, T_c, P_c, w)[0]
f1_mezcla(a) := x_1*P_A*ϕ_L.SRK(x, a, P_A, T_c, P_c, w)[0]
x(a) := 375 + 7.5*a
y(a) := [f1_puro(x(a)); f1_mezcla(x(a))]
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