ORIGIN := 1  # 2857 (ch4)
T := 298.15
P := 300  # bar
x := [0.5; 0.3; 0.2]
Tc := [190.58; 305.42; 304.19]
Pc := [46.04; 48.8; 73.82]
dasdasdasdasads
w := [0.011; 0.099; 0.228]
a := 5
# [reference: SRK.xmcdz]
fugpuro(P, i) := P*ϕ_VSRK.puro*(T, P, Tc, Pc, w)  # error: This variable is undefined.
